*Heading
 CSDM_cph pressure hull linear buckling
** Job name: C5 Model name: CPH_Model
** Generated by: Abaqus/CAE 2023
*Preprint, echo=NO, model=NO, history=NO, contact=NO
**
** PARTS
**
*Part, name=CompositeHull
*Node
      1,   100.462547,           0.,  -20.6455784
      2,   94.2501526,           0.,  -40.4459267
      3,   84.1791382,           0.,  -58.5904121
      4,   70.6618271,           0.,  -74.3361969
      5,    54.251606,           0.,  -87.0386505
      6,   35.6203232,           0.,  -96.1777344
      7,    15.530736,           0.,  -101.379288
      8,  -5.19468021,           0.,  -102.430359
      9,  -25.7074242,           0.,  -99.2879257
     10,  -45.1677055,           0.,  -92.0806274
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*Element, type=S4R
   1,   31,    1,   32,   62
   2,    1,    2,   33,   32
   3,    2,    3,   34,   33
   4,    3,    4,   35,   34
   5,    4,    5,   36,   35
   6,    5,    6,   37,   36
   7,    6,    7,   38,   37
   8,    7,    8,   39,   38
   9,    8,    9,   40,   39
  10,    9,   10,   41,   40
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*Orientation, name=Ori-1
1., 0., 0., 0., 1., 0.
1, 0.
** Region: (CompositeLayup-1-1: Generated From Layup)
*Elset, elset=CompositeLayup-1-1, generate
    1,  1085,     1
** Section: CompositeLayup-1-1
*Shell Section, elset=CompositeLayup-1-1, composite, orientation=Ori-1, density=0., layup=CompositeLayup-1
0.279775, 3, Composite, 90., Ply-1
0.279775, 3, Composite, 90., Ply-2
0.279775, 3, Composite, 90., Ply-3
0.279775, 3, Composite, 90., Ply-4
0.279775, 3, Composite, 22.504, Ply-5
0.279775, 3, Composite, -22.504, Ply-6
0.279775, 3, Composite, 23.545, Ply-7
0.279775, 3, Composite, -23.545, Ply-8
0.279775, 3, Composite, 22.504, Ply-9
0.279775, 3, Composite, -22.504, Ply-10
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*End Part
**
**
** ASSEMBLY
**
*Assembly, name=Assembly
**
*Instance, name=CompositeHull-1, part=CompositeHull
*End Instance
**
*Nset, nset=_PickedSet5, internal, instance=CompositeHull-1, generate
  1,  31,   1
*Elset, elset=_PickedSet5, internal, instance=CompositeHull-1, generate
  1,  31,   1
*Nset, nset=_PickedSet6, internal, instance=CompositeHull-1, generate
 1086,  1116,     1
*Elset, elset=_PickedSet6, internal, instance=CompositeHull-1, generate
 1055,  1085,     1
*Elset, elset=__PickedSurf4_SPOS, internal, instance=CompositeHull-1, generate
    1,  1085,     1
*Surface, type=ELEMENT, name=_PickedSurf4, internal
__PickedSurf4_SPOS, SPOS
*End Assembly
**
** MATERIALS
**
*Material, name=Composite
*Density
 1.55e-09,
*Elastic, type=LAMINA
102000.,7000., 0.16,3350.,3350.,2680.
*Fail Stress
1400.,1050.,  28., 105.,  75.,   0.,   0.
**
** BOUNDARY CONDITIONS
**
** Name: BC-End-0 Type: �Գ�/���Գ�/��ȫ�̶�
*Boundary
_PickedSet5, ENCASTRE
** Name: BC-End-1 Type: �Գ�/���Գ�/��ȫ�̶�
*Boundary
_PickedSet6, ENCASTRE
** ----------------------------------------------------------------
**
** STEP: Step-1
**
*Step, name=Step-1, nlgeom=NO, perturbation
*Buckle
8, , 12, 300
**
** BOUNDARY CONDITIONS
**
** Name: BC-End-0 Type: �Գ�/���Գ�/��ȫ�̶�
*Boundary, op=NEW, load case=1
_PickedSet5, ENCASTRE
*Boundary, op=NEW, load case=2
_PickedSet5, ENCASTRE
** Name: BC-End-1 Type: �Գ�/���Գ�/��ȫ�̶�
*Boundary, op=NEW, load case=1
_PickedSet6, ENCASTRE
*Boundary, op=NEW, load case=2
_PickedSet6, ENCASTRE
**
** LOADS
**
** Name: ExternalPressure   Type: Pressure
*Dsload
_PickedSurf4, P, 1.
**
** OUTPUT REQUESTS
**
*Restart, write, frequency=0
**
** FIELD OUTPUT: F-Output-1
**
*Output, field, variable=PRESELECT
*Node File
U
*End Step
