*Heading
 CSDM_cph pressure hull linear buckling
** Job name: C6 Model name: CPH_Model
** Generated by: Abaqus/CAE 2023
*Preprint, echo=NO, model=NO, history=NO, contact=NO
**
** PARTS
**
*Part, name=CompositeHull
*Node
      1,   85.4169159,           0.,   -14.253562
      2,   81.9058838,           0.,  -28.1183243
      3,   76.1606674,           0.,  -41.2160912
      4,   68.3379898,           0.,  -53.1895943
      5,   58.6512299,           0.,  -63.7122192
      6,   47.3646164,           0.,  -72.4969406
      7,   34.7860222,           0.,  -79.3041382
      8,   21.2585526,           0.,  -83.9481277
      9,   7.15120602,           0.,  -86.3022232
     10,  -7.15120602,           0.,  -86.3022232
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*Element, type=S4R
   1,   38,    1,   39,   76
   2,    1,    2,   40,   39
   3,    2,    3,   41,   40
   4,    3,    4,   42,   41
   5,    4,    5,   43,   42
   6,    5,    6,   44,   43
   7,    6,    7,   45,   44
   8,    7,    8,   46,   45
   9,    8,    9,   47,   46
  10,    9,   10,   48,   47
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*Orientation, name=Ori-1
1., 0., 0., 0., 1., 0.
1, 0.
** Region: (CompositeLayup-1-1: Generated From Layup)
*Elset, elset=CompositeLayup-1-1, generate
    1,  1140,     1
** Section: CompositeLayup-1-1
*Shell Section, elset=CompositeLayup-1-1, composite, orientation=Ori-1, density=0., layup=CompositeLayup-1
0.41385, 3, Composite, 90., Ply-1
0.41385, 3, Composite, 90., Ply-2
0.41385, 3, Composite, 90., Ply-3
0.41385, 3, Composite, 90., Ply-4
0.41385, 3, Composite, 90., Ply-5
0.41385, 3, Composite, 45., Ply-6
0.41385, 3, Composite, -45., Ply-7
0.41385, 3, Composite, 0., Ply-8
0.41385, 3, Composite, 90., Ply-9
0.41385, 3, Composite, 45., Ply-10
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*End Part
**
**
** ASSEMBLY
**
*Assembly, name=Assembly
**
*Instance, name=CompositeHull-1, part=CompositeHull
*End Instance
**
*Nset, nset=_PickedSet5, internal, instance=CompositeHull-1, generate
  1,  38,   1
*Elset, elset=_PickedSet5, internal, instance=CompositeHull-1, generate
  1,  38,   1
*Nset, nset=_PickedSet6, internal, instance=CompositeHull-1, generate
 1141,  1178,     1
*Elset, elset=_PickedSet6, internal, instance=CompositeHull-1, generate
 1103,  1140,     1
*Elset, elset=__PickedSurf4_SPOS, internal, instance=CompositeHull-1, generate
    1,  1140,     1
*Surface, type=ELEMENT, name=_PickedSurf4, internal
__PickedSurf4_SPOS, SPOS
*End Assembly
**
** MATERIALS
**
*Material, name=Composite
*Density
 1.6e-09,
*Elastic, type=LAMINA
218000.,9070.,  0.3,6350.,6350.,5080.
*Fail Stress
2088.,1212., 22.5, 196., 61.1,   0.,   0.
**
** BOUNDARY CONDITIONS
**
** Name: BC-End-0 Type: �Գ�/���Գ�/��ȫ�̶�
*Boundary
_PickedSet5, ENCASTRE
** Name: BC-End-1 Type: �Գ�/���Գ�/��ȫ�̶�
*Boundary
_PickedSet6, ENCASTRE
** ----------------------------------------------------------------
**
** STEP: Step-1
**
*Step, name=Step-1, nlgeom=NO, perturbation
*Buckle
8, , 12, 300
**
** BOUNDARY CONDITIONS
**
** Name: BC-End-0 Type: �Գ�/���Գ�/��ȫ�̶�
*Boundary, op=NEW, load case=1
_PickedSet5, ENCASTRE
*Boundary, op=NEW, load case=2
_PickedSet5, ENCASTRE
** Name: BC-End-1 Type: �Գ�/���Գ�/��ȫ�̶�
*Boundary, op=NEW, load case=1
_PickedSet6, ENCASTRE
*Boundary, op=NEW, load case=2
_PickedSet6, ENCASTRE
**
** LOADS
**
** Name: ExternalPressure   Type: Pressure
*Dsload
_PickedSurf4, P, 1.
**
** OUTPUT REQUESTS
**
*Restart, write, frequency=0
**
** FIELD OUTPUT: F-Output-1
**
*Output, field, variable=PRESELECT
*Node File
U
*End Step
