*Heading
 CSDM_cph pressure hull linear buckling
** Job name: C8 Model name: CPH_Model
** Generated by: Abaqus/CAE 2023
*Preprint, echo=NO, model=NO, history=NO, contact=NO
**
** PARTS
**
*Part, name=CompositeHull
*Node
      1,   157.793976,           0.,  -15.7896681
      2,   155.437714,           0.,   -31.422411
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*Element, type=S4R
   1,   63,    1,   64,  126
   2,    1,    2,   65,   64
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*Orientation, name=Ori-1
1., 0., 0., 0., 1., 0.
1, 0.
** Region: (CompositeLayup-1-1: Generated From Layup)
*Elset, elset=CompositeLayup-1-1, generate
    1,  1890,     1
** Section: CompositeLayup-1-1
*Shell Section, elset=CompositeLayup-1-1, composite, orientation=Ori-1, density=0., layup=CompositeLayup-1
0.49375, 3, Composite, 69.94, Ply-1
0.49375, 3, Composite, -69.94, Ply-2
0.49375, 3, Composite, 18.188, Ply-3
0.49375, 3, Composite, -18.188, Ply-4
0.49375, 3, Composite, 69.94, Ply-5
0.49375, 3, Composite, -69.94, Ply-6
0.49375, 3, Composite, 18.188, Ply-7
0.49375, 3, Composite, -18.188, Ply-8
0.49375, 3, Composite, 69.94, Ply-9
0.49375, 3, Composite, -69.94, Ply-10
0.49375, 3, Composite, 18.188, Ply-11
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0.49375, 3, Composite, -18.188, Ply-40
*End Part
**
**
** ASSEMBLY
**
*Assembly, name=Assembly
**
*Instance, name=CompositeHull-1, part=CompositeHull
*End Instance
**
*Nset, nset=_PickedSet5, internal, instance=CompositeHull-1, generate
  1,  63,   1
*Elset, elset=_PickedSet5, internal, instance=CompositeHull-1, generate
  1,  63,   1
*Nset, nset=_PickedSet6, internal, instance=CompositeHull-1, generate
 1891,  1953,     1
*Elset, elset=_PickedSet6, internal, instance=CompositeHull-1, generate
 1828,  1890,     1
*Elset, elset=__PickedSurf4_SPOS, internal, instance=CompositeHull-1, generate
    1,  1890,     1
*Surface, type=ELEMENT, name=_PickedSurf4, internal
__PickedSurf4_SPOS, SPOS
*End Assembly
**
** MATERIALS
**
*Material, name=Composite
*Density
 1.6e-09,
*Elastic, type=LAMINA
218000.,9070.,  0.3,6350.,6350.,5080.
*Fail Stress
2088.,1212., 22.5, 196., 61.1,   0.,   0.
**
** BOUNDARY CONDITIONS
**
** Name: BC-End-0 Type: �Գ�/���Գ�/��ȫ�̶�
*Boundary
_PickedSet5, ENCASTRE
** Name: BC-End-1 Type: �Գ�/���Գ�/��ȫ�̶�
*Boundary
_PickedSet6, ENCASTRE
** ----------------------------------------------------------------
**
** STEP: Step-1
**
*Step, name=Step-1, nlgeom=NO, perturbation
*Buckle
8, , 12, 300
**
** BOUNDARY CONDITIONS
**
** Name: BC-End-0 Type: �Գ�/���Գ�/��ȫ�̶�
*Boundary, op=NEW, load case=1
_PickedSet5, ENCASTRE
*Boundary, op=NEW, load case=2
_PickedSet5, ENCASTRE
** Name: BC-End-1 Type: �Գ�/���Գ�/��ȫ�̶�
*Boundary, op=NEW, load case=1
_PickedSet6, ENCASTRE
*Boundary, op=NEW, load case=2
_PickedSet6, ENCASTRE
**
** LOADS
**
** Name: ExternalPressure   Type: Pressure
*Dsload
_PickedSurf4, P, 1.
**
** OUTPUT REQUESTS
**
*Restart, write, frequency=0
**
** FIELD OUTPUT: F-Output-1
**
*Output, field, variable=PRESELECT
*Node File
U
*End Step
